// COMSOL Multiphysics 6.3.0.290 model "COMSOL_2D_Clay_Settlement_GWT_1m.mph"
// Outline of the model tree

Parameters
  K0 = 1-sin(25[deg])  // At-rest earth pressure coefficient

Variables
  var1 "Groundwater and Effective Stress"
    depth = -y
    sigv_eff = 17[kN/m^3]*min(depth,1[m])+9.19[kN/m^3]*max(depth-1[m],0[m])
    pw = 9.81[kN/m^3]*max(depth-1[m],0[m])
    pc0_init = max(0.8903*sigv_eff,1[kPa])

Geometry
  geom1 "Geometry 1" (2D, length unit m)
    r1: Rectangle | size = {3, 3}; pos = {0, -3}
    fin: Finalize "Form Union"

Physics
  solid: SolidMechanics on all domains
    dependent variable u = {u, v, w}
    lemm1: LinearElasticModel "Linear Elastic Material 1" (default)
      E_mat = userdef
      E = 2050000
      nu_mat = userdef
      nu = 0.15
    free1: Free (default)
    init1: init "Initial Values 1" (default)
    fix1: Fixed "Fixed Constraint 1" on boundaries 2
    disp1: Displacement1 "Prescribed Displacement 1" on boundaries 1, 4 | Direction = {prescribed, free, free}
    bndl1: BoundaryLoad on boundaries 3 | forceReferenceArea = {0, -25000, 0}

Mesh
  mesh1 "Mesh 1" (physics-controlled)

Studies
  std2 "Study 2"
    stat: Stationary

Solver configurations
  sol2 "Solution 2" (study std2)
    v1: Variables "Dependent Variables 1"
    s1: Stationary "Stationary Solver 1"
      dDef: Direct
      fc1: FullyCoupled

Datasets
  dset2: Solution | solution = sol2
  edg1: Edge2D on boundaries 3 | data = dset2
  cln1: CutLine2D | data = dset2; genpoints = {{1.5, 0}, {1.5, -3}}

Tables
  tbl1: Table
    // Point Evaluation 1
    Displacement field, Y-component (mm), Point: 2
    -62.7961
  tbl2: Table
    // Point Evaluation 1
    Displacement field, Y-component (mm), Point: 2
    -28.1476
  tbl3: Table
    // Point Evaluation 1
  tbl4: Table
    Arc length (m) | -v
    0 | 34.6485
    0.0230027 | 34.3828
    0.0232087 | 34.3804
    0.0234183 | 34.378
    0.0464173 | 34.1124
    0.0690082 | 33.8515
    0.069626 | 33.8443
    0.0702548 | 33.8371
    0.0928346 | 33.5763
    0.115014 | 33.3201
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
Plots
  pg1: PlotGroup2D "Stress (solid)" | data = dset2; inputmode = addmarkerpoint
    surf1: Surface
      data = dset2
      expr = -v
      unit = mm
      prefixintitle = COMSOL 2D - Vertical Settlement Under 25 kPa Surcharge
      typeintitle = off
      descriptionintitle = off
      def: Deform "Deformation" | expr = {u, v}; descr = Displacement field
    arwl1: ArrowLine | data = edg1; expr = {u, v}; descr = Displacement field; arrowcount = 15
    ann1: Annotation | text = Maximum vertical settlement = 34.65 mm
  pg2: PlotGroup2D "Model Geometry, Mesh and Loading"
    mesh1: Mesh | data = dset2
    arwl1: ArrowLine | data = edg1; expr = {u, -1}; arrowcount = 15
  pg3: PlotGroup1D "1D Plot Group 3" | data = dset2
    lngr1: LineGraph | data = cln1; expr = -v; unit = mm

Exports
  plot1: Plot | filename = D:\COMSOL projects\Project 001 3 m clay soil settlement\OMSOL_2D_Settlement_vs_Depth.txt